solve block
    # guess values
    a := [
        2.20, -3.17, 1.24, -0.87;
        1.50, 2.11, -0.45, 1.44;
        0.86, -1.44, 0.62, 0.28;
        0.48, 1.25, -0.63, -0.97
    ]
    b := [0.46; 1.50; -0.12; 0.35]
    lsolve(a, b) = [0.0841662; 2.72291; 6.47156; -1.01346]
end solve block
