solve block
    # guess values
    x1 := 0
    x2 := 0
    x3 := 0
    x4 := 0
    # constraints
    x1 == 0.22*x2 - 0.11*x3 + 0.31*x4 + 2.70
    x2 == 0.38*x1 - 0.12*x3 + 0.22*x4 - 1.5
    x3 == 0.11*x1 + 0.23*x2 - 0.51*x4 + 1.2
    x4 == 0.17*x1 - 0.21*x2 + 0.31*x3 - 0.17
    # solver
    Find(x1, x2, x3, x4) = [2.70729; -0.440745; 1.03722; 0.704333]
end solve block
solve block
    # guess values
    k := 4
    gien
    root(k) =  # error: Эта переменная не определена. Проверьте правильность установки обозначения.
end solve block
