# Worksheet setting: ORIGIN = 1
n := 6
k := 1 .. n
j := 1 .. n
x := [0.10; 0.20; 0.29; 0.40; 0.49; 0.55]
y := [1.66448; 1.66071; 1.65734; 1.65322; 1.64987; 1.64764]
t := 0.153
Ln(t) := sum(y[k]*product(if(k == j, 1, (t - x[j])/(x[k] - x[j])), j = 1 .. n), k = 1 .. n)
Ln(0.153) = 1.66247
