# Worksheet setting: ORIGIN = 1
x := [3.0, 3.1, 3.2, 3.3, 3.4, 3.5]
y := [25.0, 29.4, 34.4, 40.4, 47.6, 56.0]
sx := sum(x)
sy := sum(y)
tx := transpose(x)
ty := transpose(y)
sxx := sum(tx[i]^2, i = 1 .. 6)
sxy := sum(tx[i]*ty[i], i = 1 .. 6)
solve block
    # guess values
    a := 2
    b := 2
    # constraints
    a*sxx + b*sx - sxy == 0
    a*sx + 6*b - sy == 0
    # solver
    Find(a, b) = [61.6; -161.4]
end solve block
