a := 0
b := 1
h := 0.1
n := (b - a)/h
y[0] := 0.5
F(x, y) := x^3 + y^2
Z := rkfixed(y, a, b, n, F)
Z = [
    0, 0.5;
    0.1, 0.526341;
    0.2, 0.555973;
    0.3, 0.590407;
    0.4, 0.632069;
    0.5, 0.684508;
    0.6, 0.752738;
    0.7, 0.843794;
    0.8, 0.967748;
    0.9, 1.13963;
    1, 1.3834
]
